<?xml version="1.0"?>

<flight_control name="JA37 FC">

    <channel execrate="4" name="Canopy">

        <!-- canopy get stuck if it fail -->
        <switch name="names/canopy/tmp-engage">
            <default value="fcs/canopy/engage"/>
            <test logic="OR" value="fcs/canopy/pos-norm">
                fcs/canopy/serviceable == 0
                fcs/canopy/hinges/serviceable == 0
                fcs/canopy/has-power == 0
            </test>
            <output>fcs/canopy/engageTmp</output>
        </switch>

        <kinematic name="names/canopy/pos-norm">
            <input>fcs/canopy/engageTmp</input>
            <traverse>
                <setting>
                    <position>0.0</position>
                    <time>0.0</time>
                </setting>
                <setting>
                    <position>1.0</position>
                    <time>5.0</time>
                </setting>
            </traverse>
            <output>fcs/canopy/pos-norm</output>
        </kinematic>

        <pure_gain name="names/canopy/mp">
            <input>fcs/canopy/pos-norm</input>
            <gain>1</gain>
            <output>/canopy/position-norm</output>
            <!-- used for auto MP transmit and animation -->
        </pure_gain>
    </channel>

    <!--
                   Elevator -25 to +20  (page 131, figure 108b)
                   Elevator -25 to +20  (page 133, figure 110a)
                   Elevator -25 to +20  (page  79, figure  62a)
                   Pretty sure I saw something about max +10 for elevator, but no longer know where.

                   Aileron  -15 to +15  (page 133, figure 110b)

                   Rudder   -25 to +25  (page 115, figure  92 )

                   Flaps           +30  (page  87)
                   Flaps     -4 to +30  (page  78,  figure 60 )
                   Flaps     -7 to +30  (page  76) -7 can be selected by pilot in AJ-37 not JA-37, -4 default
                   Flaps     -7 to +30  (page  46)

-->


    <channel execrate="1" name="input">

        <switch name="fcs/elevator/input">
            <description>If flight input is used to control CI/TI/MI cursor, flight controls are frozen.</description>
            <default value="fcs/elevator-cmd-norm"/>
            <test logic="AND" value="fcs/elevator/input">
                /ja37/systems/input-controls-flight == 0
            </test>
        </switch>

        <switch name="fcs/aileron/input">
            <description>If flight input is used to control CI/TI/MI cursor, flight controls are frozen.</description>
            <default value="fcs/aileron-cmd-norm"/>
            <test logic="AND" value="fcs/aileron/input">
                /ja37/systems/input-controls-flight == 0
            </test>
        </switch>

        <switch name="fcs/rudder/input">
            <description>If flight input is used to control CI/TI/MI cursor, flight controls are frozen.</description>
            <default value="fcs/rudder-cmd-norm"/>
            <test logic="AND" value="fcs/rudder/input">
                /ja37/systems/input-controls-flight == 0
            </test>
        </switch>

    </channel>

	<!-- Begin new FCS by Joshua Davidson (it0uchpods) -->
	<!-- Copyright (c) 2019 Joshua Davidson (it0uchpods) -->

	<property value="22.0">fcs/elevon/pitch-gearing-feedback</property>
	<property value="15.0">fcs/elevon/roll-gearing-feedback</property>

	<channel name="Elevons">

		<fcs_function name="fcs/elevon/pitch-cmd-deadzone">
			<function>
				<table>
					<independentVar lookup="row">fcs/elevator/input</independentVar> <!-- Input from control/TI selector -->
					<tableData>
						-1.0000 -1.0
						-0.0415  0.0
						 0.0000  0.0
						 0.0415  0.0
						 1.0000  1.0
					</tableData>
				</table>
			</function>
		</fcs_function>

		<fcs_function name="fcs/elevon/pitch-cmd-geared">
			<function>
				<table>
					<independentVar lookup="row">fcs/elevon/pitch-cmd-deadzone</independentVar>
					<tableData>
						-1.00 -1.000
						-0.86 -0.740
						-0.75 -0.560
						-0.62 -0.400
						-0.50 -0.280
						-0.38 -0.190
						-0.23 -0.110
						-0.10 -0.045
						 0.00  0.000
						 0.10  0.045
						 0.23  0.110
						 0.38  0.190
						 0.50  0.280
						 0.62  0.400
						 0.75  0.560
						 0.86  0.740
						 1.00  1.000
					</tableData>
				</table>
			</function>
			<output>fcs/drivers/pitch/stick-geared</output>
			<clipto>
				<min>-1.0</min>
				<max>0.727272</max> <!-- Clipping for linear deflection end -->
			</clipto>
		</fcs_function>

		<summer name="fcs/elevon/pitch-gear-input-sum">
			<description>Sum of inputs passed through gearing</description>
			<input>fcs/elevon/pitch-cmd-geared</input> <!-- Input from Pitch Stick Gearing -->
			<input>fcs/pitch-trim-cmd-norm</input> <!-- Pitch Trim -->
		</summer>

		<summer name="fcs/elevon/pitch-nogear-input-sum">
			<description>Sum of inputs NOT passed through gearing</description>
			<input>fcs/drivers/pitch-output</input> <!-- Pitch Rate Damper -->
			<input>fcs/drivers/series-trim-output</input> <!-- Series Trim -->
			<!--input>autoflight/output/pitch-cmd</input--> <!-- A/P Pitch Command -->
		</summer>

		<fcs_function name="fcs/elevon/pitch-gearing">
			<function>
				<table> <!-- Calculated by Necolatis, do not remove spaces in lines, they have a purpose despite being ugly :) -->
					<independentVar lookup="row">aero/qbar-psf</independentVar>
					<independentVar lookup="column">fcs/elevator/gearing-enable</independentVar>
					<independentVar lookup="table">atmosphere/density-altitude</independentVar>
					<tableData breakPoint="0">
						      0     1
						 150  22.0  22.0
						 295  22.0  20.8

						 390  22.0  16.8
						 465  22.0  14.3
						 530  22.0  12.2
						 590  22.0  11.0
						 645  22.0  10.3
						 700  22.0   9.7
						 745  22.0   9.3
						 790  22.0   8.9
						 834  22.0   8.6
						 880  22.0   8.3
						 925  22.0   8.2
						 975  22.0   8.2
						1070  22.0   8.0
						1120  22.0   8.0
						1175  22.0   7.9
						1230  22.0   7.6
						1290  22.0   7.4
						1350  22.0   7.3
						1423  22.0   7.7
						1500  22.0   7.3
						1575  22.0   7.0
						1650  22.0   6.4
						1725  22.0   6.3

						2120  22.0   5.7
						2300  22.0   4.0
					</tableData>
					<tableData breakPoint="10000">
						      0     1
						 300  22.0  22.0

						 465  22.0  11.8
						 515  22.0  10.7
						 565  22.0   9.9
						 610  22.0   9.5
						 655  22.0   9.2
						 700  22.0   9.0
						 745  22.0   8.9
						 790  22.0   8.8
						 835  22.0   8.7
						 880  22.0   8.5
						 930  22.0   8.6
						 977  22.0   9.0
						1025  22.0   9.1
						1075  22.0   8.7
						1130  22.0   8.4
						1180  22.0   8.0
						1230  22.0   7.7
						1290  22.0   7.4
						1350  22.0   7.1
						1405  22.0   6.8
						1460  22.0   6.6
						1520  22.0   6.4
						1574  22.0   6.1

						1750  22.0   7.9
						2120  22.0   4.5
						2300  22.0   4.0
					</tableData>
					<tableData breakPoint="20000">
						      0     1
						 150  22.0  22.0
						 295  22.0  22.0
						 530  22.0  21.0

						 780  22.0  10.0
						 850  22.0   9.3
						 925  22.0   8.8
						1000  22.0   8.4
						1035  22.0   8.1
						1065  22.0   7.9
						1165  22.0   7.7
						1200  22.0   7.5
						1235  22.0   6.9
						1270  22.0   7.1
						1305  22.0   6.6
						1335  22.0   6.9
						1360  22.0   6.8
						1385  22.0   6.3
						1410  22.0   6.5

						1750  22.0   4.0
					</tableData>
					<tableData breakPoint="35000">
						      0     1
						 520  22.0  22.0
						 575  22.0  19.1
						 630  22.0  17.1
						 680  22.0  15.7
						 733  22.0  14.6
						 785  22.0  14.0
						 835  22.0  13.5
						 885  22.0  12.6
						 930  22.0  11.5
						 965  22.0  10.5

						1500  22.0   4.0
					</tableData>
				</table>
			</function>
		</fcs_function>

		<switch name="fcs/elevon/pitch-gearing-switched">
			<default value="fcs/elevon/pitch-gearing"/>
			<test value="fcs/elevon/pitch-gearing-feedback">
				/ja37/elec/ac-bus-main-bool ne 1
			</test>
			<output>fcs/elevon/pitch-gearing-feedback</output>
		</switch>

		<pure_gain name="fcs/elevon/pitch-gear-input-deg">
			<description>Deflection pitch surface linearly for inputs passed through gearing</description>
			<input>fcs/elevon/pitch-gear-input-sum</input>
			<gain>fcs/elevon/pitch-gearing-switched</gain>
			<clipto>
				<min>-22.0</min>
				<max>16.0</max>
			</clipto>
		</pure_gain>

		<pure_gain name="fcs/elevon/pitch-nogear-input-deg">
			<description>Deflection pitch surface linearly for inputs NOT passed through gearing</description>
			<input>fcs/elevon/pitch-nogear-input-sum</input>
			<gain>22.0</gain>
			<clipto>
				<min>-22.0</min>
				<max>16.0</max>
			</clipto>
		</pure_gain>

		<summer name="fcs/elevon/pitch-pos-deg">
			<input>fcs/elevon/pitch-gear-input-deg</input>
			<input>fcs/elevon/pitch-nogear-input-deg</input>
			<clipto>
				<min>-22.0</min>
				<max>16.0</max>
			</clipto>
		</summer>

		<fcs_function name="fcs/elevon/roll-cmd-geared">
			<function>
				<table>
					<independentVar lookup="row">fcs/aileron/input</independentVar> <!-- Input from control/TI selector -->
					<tableData>
						-1.00 -1.000
						-0.86 -0.740
						-0.75 -0.560
						-0.62 -0.400
						-0.50 -0.280
						-0.38 -0.190
						-0.23 -0.110
						-0.10 -0.045
						 0.00  0.000
						 0.10  0.045
						 0.23  0.110
						 0.38  0.190
						 0.50  0.280
						 0.62  0.400
						 0.75  0.560
						 0.86  0.740
						 1.00  1.000
					</tableData>
				</table>
			</function>
			<output>fcs/drivers/roll/stick-geared</output>
		</fcs_function>

		<summer name="fcs/elevon/roll-gear-input-sum">
			<description>Sum of inputs passed through gearing</description>
			<input>fcs/elevon/roll-cmd-geared</input> <!-- Input from Roll Stick Gearing -->
			<input>fcs/roll-trim-cmd-norm</input> <!-- Roll Trim -->
		</summer>

		<summer name="fcs/elevon/roll-nogear-input-sum">
			<description>Sum of inputs NOT passed through gearing</description>
			<input>fcs/drivers/roll-output</input> <!-- Roll Rate Damper/Limiter -->
			<!--input>autoflight/output/roll-cmd</input--> <!-- A/P Roll Command -->
		</summer>

		<switch name="fcs/elevon/roll-gearing">
			<default value="fcs/elevon/roll-gearing-feedback"/>
			<test logic="OR" value="15"> <!-- Low Speed Gear -->
				velocities/vc-kts le 349
			</test>
			<test logic="OR" value="10"> <!-- High Speed Gear -->
				velocities/vc-kts ge 351
			</test>
			<output>fcs/elevon/roll-gearing-feedback</output>
		</switch>

		<actuator name="fcs/elevon/roll-gearing-actuator">
			<input>fcs/elevon/roll-gearing</input>
			<rate_limit sense="incr">0.5</rate_limit> <!-- 10 seconds high to low -->
			<rate_limit sense="decr">1.0</rate_limit> <!-- 5 seconds low to high -->
		</actuator>

		<pure_gain name="fcs/elevon/roll-gear-input-deg">
			<description>Deflection roll surface linearly for inputs passed through gearing</description>
			<input>fcs/elevon/roll-gear-input-sum</input>
			<gain>fcs/elevon/roll-gearing-actuator</gain>
			<clipto>
				<min>-15.0</min>
				<max>15.0</max>
			</clipto>
		</pure_gain>

		<pure_gain name="fcs/elevon/roll-nogear-input-deg">
			<description>Deflection roll surface linearly for inputs NOT passed through gearing</description>
			<input>fcs/elevon/roll-nogear-input-sum</input>
			<gain>15.0</gain>
			<clipto>
				<min>-15.0</min>
				<max>15.0</max>
			</clipto>
		</pure_gain>

		<summer name="fcs/elevon/roll-pos-deg">
			<input>fcs/elevon/roll-gear-input-deg</input>
			<input>fcs/elevon/roll-nogear-input-deg</input>
			<clipto>
				<min>-15.0</min>
				<max>15.0</max>
			</clipto>
		</summer>

		<summer name="fcs/elevon/left-outer-mixer">
			<input>fcs/elevon/pitch-pos-deg</input>
			<input>fcs/elevon/roll-pos-deg</input>
			<clipto>
				<min>-27.0</min>
				<max>21.0</max>
			</clipto>
		</summer>

		<summer name="fcs/elevon/right-outer-mixer">
			<input>fcs/elevon/pitch-pos-deg</input>
			<input>-fcs/elevon/roll-pos-deg</input>
			<clipto>
				<min>-27.0</min>
				<max>21.0</max>
			</clipto>
		</summer>

		<fcs_function name="fcs/elevon/droop">
			<function>
				<table>
					<independentVar lookup="row">velocities/vc-kts</independentVar>
					<tableData>
						62  21
						77   0
					</tableData>
				</table>
			</function>
		</fcs_function>

		<switch name="fcs/elevon/serviceable">
			<default value="1"/>
			<test logic="AND" value="0">
				fcs/aileron/serviceable eq 0
				fcs/elevator/serviceable eq 0
			</test>
		</switch>

		<switch name="fcs/elevon/left-outer-switched">
			<default value="fcs/elevon/left-outer-mixer"/>
			<test value="0">
				structural/wings/serviceable eq 0
			</test>
			<test logic="OR" value="fcs/elevon/droop">
				systems/hydraulics/flight-surface-actuation eq 0
				fcs/elevon/serviceable eq 0
			</test>
		</switch>

		<switch name="fcs/elevon/right-outer-switched">
			<default value="fcs/elevon/right-outer-mixer"/>
			<test value="0">
				structural/wings/serviceable eq 0
			</test>
			<test logic="OR" value="fcs/elevon/droop">
				systems/hydraulics/flight-surface-actuation eq 0
				fcs/elevon/serviceable eq 0
			</test>
		</switch>

		<actuator name="fcs/elevon/left-outer-deg">
			<input>fcs/elevon/left-outer-switched</input>
			<rate_limit>102</rate_limit>
			<lag>26.7</lag>
			<output>fcs/left-aileron-pos-norm</output> <!-- Is actually deg, but we do this to send over MP -->
		</actuator>

		<actuator name="fcs/elevon/right-outer-deg">
			<input>fcs/elevon/right-outer-switched</input>
			<rate_limit>102</rate_limit>
			<lag>26.7</lag>
			<output>fcs/right-aileron-pos-norm</output> <!-- Is actually deg, but we do this to send over MP -->
		</actuator>

		<actuator name="fcs/elevon/left-inner-deg">
			<input>fcs/elevon/left-outer-switched</input> <!-- FIXME: AJ use seperate -->
			<rate_limit>102</rate_limit>
			<lag>26.7</lag>
			<output>fcs/elevator-pos-norm</output> <!-- Is actually deg, but we do this to send over MP -->
		</actuator>

		<actuator name="fcs/elevon/right-inner-deg">
			<input>fcs/elevon/right-outer-switched</input> <!-- FIXME: AJ use seperate -->
			<rate_limit>102</rate_limit>
			<lag>26.7</lag>
			<output>fcs/spoiler-pos-norm</output> <!-- Is actually deg, but we do this to send over MP -->
		</actuator>

		<fcs_function name="fcs/elevon/average-aero-deg">
			<function>
				<sum>
					<product>
						<property>fcs/elevon/left-outer-deg</property>
						<value>0.25</value>
					</product>
					<product>
						<property>fcs/elevon/left-inner-deg</property>
						<value>0.25</value>
					</product>
					<product>
						<property>fcs/elevon/right-inner-deg</property>
						<value>0.25</value>
					</product>
					<product>
						<property>fcs/elevon/right-outer-deg</property>
						<value>0.25</value>
					</product>
				</sum>
			</function>
		</fcs_function>

		<pure_gain name="fcs/elevon/average-aero-rad">
			<input>fcs/elevon/average-aero-deg</input>
			<gain>0.0174533</gain> <!-- Deg to Rad -->
		</pure_gain>

		<fcs_function name="fcs/elevon/diff-half-aero-deg">
			<function>
				<sum>
					<product>
						<property>fcs/elevon/left-outer-deg</property>
						<value>0.25</value>
					</product>
					<product>
						<property>fcs/elevon/left-inner-deg</property>
						<value>0.25</value>
					</product>
					<product>
						<property>fcs/elevon/right-inner-deg</property>
						<value>-0.25</value>
					</product>
					<product>
						<property>fcs/elevon/right-outer-deg</property>
						<value>-0.25</value>
					</product>
				</sum>
			</function>
		</fcs_function>

		<pure_gain name="fcs/elevon/diff-half-aero-rad">
			<input>fcs/elevon/diff-half-aero-deg</input>
			<gain>0.0174533</gain> <!-- Deg to Rad -->
		</pure_gain>

		<fcs_function name="fcs/elevon/left-avg-aero-deg">
			<function>
				<sum>
					<product>
						<property>fcs/elevon/left-outer-deg</property>
						<value>0.5</value>
					</product>
					<product>
						<property>fcs/elevon/left-inner-deg</property>
						<value>0.5</value>
					</product>
				</sum>
			</function>
		</fcs_function>

		<pure_gain name="fcs/elevon/left-avg-aero-rad">
			<input>fcs/elevon/left-avg-aero-deg</input>
			<gain>0.0174533</gain> <!-- Deg to Rad -->
		</pure_gain>

		<fcs_function name="fcs/elevon/right-avg-aero-deg">
			<function>
				<sum>
					<product>
						<property>fcs/elevon/right-outer-deg</property>
						<value>0.5</value>
					</product>
					<product>
						<property>fcs/elevon/right-inner-deg</property>
						<value>0.5</value>
					</product>
				</sum>
			</function>
		</fcs_function>

		<pure_gain name="fcs/elevon/right-avg-aero-rad">
			<input>fcs/elevon/right-avg-aero-deg</input>
			<gain>0.0174533</gain> <!-- Deg to Rad -->
		</pure_gain>

	</channel>

	<channel name="Rudder"> <!-- Negative is Right, Positive is Left -->

		<fcs_function name="fcs/rudder/pedal-cmd-geared">
			<function>
				<table>
					<independentVar lookup="row">fcs/rudder/input</independentVar>
					<tableData>
						-1.00 -1.000
						-0.86 -0.740
						-0.75 -0.560
						-0.62 -0.400
						-0.50 -0.280
						-0.38 -0.190
						-0.23 -0.110
						-0.10 -0.045
						 0.00  0.000
						 0.10  0.045
						 0.23  0.110
						 0.38  0.190
						 0.50  0.280
						 0.62  0.400
						 0.75  0.560
						 0.86  0.740
						 1.00  1.000
					</tableData>
				</table>
			</function>
		</fcs_function>

		<summer name="fcs/rudder/gear-input-sum">
			<description>Sum of inputs passed through gearing</description>
			<input>fcs/rudder/pedal-cmd-geared</input> <!-- Input from Rudder Pedal Gearing -->
			<input>fcs/yaw-trim-cmd-norm</input> <!-- Yaw Trim -->
		</summer>

		<summer name="fcs/rudder/nogear-input-sum">
			<description>Sum of inputs NOT passed through gearing</description>
			<input>fcs/drivers/yaw-output</input> <!-- Yaw Rate Damper -->
			<clipto>
				<min>-1.0</min>
				<max>1.0</max>
			</clipto>
		</summer>

		<fcs_function name="fcs/rudder/gearing">
			<function>
				<ifthen>
					<eq>
						<property>fcs/rudder/gearing-enable</property>
						<value>1</value>
					</eq>
					<table> <!-- All guesses -->
						<independentVar lookup="row">aero/qbar-psf</independentVar>
						<tableData>
							 150  25
							2300   4
						</tableData>
					</table>
					<value>25.0</value>
				</ifthen>
			</function>
		</fcs_function>

		<pure_gain name="fcs/rudder/gear-input-deg">
			<description>Deflection rudder surface linearly for inputs passed through gearing</description>
			<input>fcs/rudder/gear-input-sum</input>
			<gain>fcs/rudder/gearing</gain>
			<clipto>
				<min>-25.0</min>
				<max>25.0</max>
			</clipto>
		</pure_gain>

		<pure_gain name="fcs/rudder/nogear-input-deg">
			<description>Deflection rudder surface linearly for inputs NOT passed through gearing</description>
			<input>fcs/rudder/nogear-input-sum</input>
			<gain>25.0</gain>
			<clipto>
				<min>-25.0</min>
				<max>25.0</max>
			</clipto>
		</pure_gain>

		<summer name="fcs/rudder/input-pos-deg">
			<input>fcs/rudder/gear-input-deg</input>
			<input>fcs/rudder/nogear-input-deg</input>
			<clipto>
				<min>-25.0</min>
				<max>25.0</max>
			</clipto>
		</summer>

		<switch name="fcs/rudder/input-deg-cmd">
			<default value="fcs/rudder/input-pos-deg"/>
			<test logic="OR" value="0">
				systems/hydraulics/flight-surface-actuation eq 0
				fcs/rudder/serviceable eq 0
			</test>
		</switch>

		<actuator name="fcs/rudder/final-deg">
			<input>fcs/rudder/input-deg-cmd</input>
			<rate_limit>107</rate_limit>
			<lag>25.7</lag>
			<output>fcs/rudder-pos-deg</output>
		</actuator>

		<pure_gain name="fcs/rudder/final-rad">
			<input>fcs/rudder/final-deg</input>
			<gain>0.0174533</gain> <!-- Deg to Rad -->
			<output>fcs/rudder-pos-rad</output>
		</pure_gain>

		<pure_gain name="fcs/rudder/final-norm">
			<input>fcs/rudder/final-deg</input>
			<gain>0.04</gain> <!-- Normalize -->
			<output>fcs/rudder-pos-norm</output>
		</pure_gain>

	</channel>

	<!-- End new FCS by Joshua Davidson (it0uchpods) -->

    <channel execrate="1" name="Landing Gear">

        <switch name="names/gear-lever-electro-mech-lock">
            <default value="0"/>
            <test logic="AND" value="1">
                  gear/gear-lever-norm == 0
                  /instrumentation/airspeed-indicator/indicated-speed-kt gt 334.77
                  gear/bypass-lever lt 1
                  /ja37/elec/dc-bus-main-bool == 1
            </test>
            <test logic="AND" value="1">
                  gear/gear-lever-norm == 0
                  /instrumentation/airspeed-indicator/indicated-mach gt 0.65
                  gear/bypass-lever lt 1
                  /ja37/elec/dc-bus-main-bool == 1
            </test>
            <output>gear/gear-lever-lock-electro</output>
        </switch>

        <switch name="names/gear-lever-mech-lock">
            <default value="0"/>
            <test logic="AND" value="1">
                  gear/gear-lever-norm == 1
                  fcs/throttle-pos-deg lt 36 <!-- approx. 82% N2 -->
            </test>
            <output>gear/gear-lever-lock-mech</output>
        </switch>

        <switch name="names/gear-lever-lock">
            <default value="0"/>
            <test logic="OR" value="1">
                  gear/gear-lever-lock-mech == 1
                  gear/gear-lever-lock-electro == 1
            </test>
            <output>gear/gear-lever-lock</output>
        </switch>

        <switch name="names/gear-lever-cmd-norm">
            <default value="gear/gear-cmd-norm"/>
            <test logic="AND" value="1">
                  gear/gear-lever-lock-mech == 1
            </test>
            <test logic="AND" value="0">
                  gear/gear-lever-lock-electro == 1
            </test>
            <clipto>
                <min>  0 </min>
                <max>  1 </max>
            </clipto>
            <output>gear/gear-lever-cmd-norm</output>
        </switch>

        <kinematic name="names/gear-lever-norm">
            <input>gear/gear-lever-cmd-norm</input>
            <traverse>
                <setting>
                    <position>0.0</position>
                    <time>0.0</time>
                </setting>
                <setting>
                    <position>1.0</position>
                    <time>0.35</time>
                </setting>
            </traverse>
            <output>gear/gear-lever-norm</output>
        </kinematic>

        <switch name="names/gear-lever-latch">
            <default value="0"/>
            <test logic="AND" value="1">
                  gear/gear-lever-norm gt 0
                  gear/gear-lever-norm lt 1
            </test>
            <output>gear/gear-lever-latch</output>
        </switch>

        <switch name="names/gear-target-norm">
            <default value="gear/gear-lever-norm"/>
            <test logic="OR" value="1">
                  gear/unit[0]/WOW == 1
                  gear/unit[1]/WOW == 1
                  gear/unit[2]/WOW == 1
            </test>
            <!-- at loss of hydr-1 the gears can go down (if positive gravity), but not up: -->
            <test logic="AND" value="gear/gear-pos-norm">
                  gear/gear-lever-norm == 0
                  systems/hydraulics/system1/pressure == 0
            </test>
            <test logic="AND" value="gear/gear-lever-norm">
                  gear/gear-lever-norm == 1
                  systems/hydraulics/system1/pressure == 0
                  accelerations/Nz gt 0.5
            </test>
            <test logic="AND" value="gear/gear-pos-norm">
                  gear/gear-lever-norm == 1
                  systems/hydraulics/system1/pressure == 0
            </test>
            <clipto>
                <min>  0 </min>
                <max>  1 </max>
            </clipto>
            <output>gear/gear-target-norm</output>
        </switch>

        <switch name="names/gear-filtered-norm">
            <default value="gear/gear-target-norm"/>
            <test logic="OR" value="gear/gear-pos-norm">
                  systems/hydraulics/flight-surface-actuation == 0
                  gear/serviceable == 0
            </test>
            <clipto>
                <min>  0 </min>
                <max>  1 </max>
            </clipto>
            <output>gear/gear-filtered-norm</output>
        </switch>

        <kinematic name="names/gear-pos-norm">
            <input>gear/gear-filtered-norm</input>
            <traverse>
                <setting>
                    <position>0.0</position>
                    <time>0.0</time>
                </setting>
                <setting>
                    <position>1.0</position>
                    <time>7</time>
                </setting>
            </traverse>
            <output>gear/gear-pos-norm</output>
        </kinematic>

        <kinematic name="names/nose-wheel-steering/kinematic-norm">
            <input>gear/unit[0]/nose-wheel-steering/tmp-norm</input>
            <traverse>
                <setting>
                    <position>-1.0</position>
                    <time>0.0</time>
                </setting>
                <setting>
                    <position>1.0</position>
                    <time>0.5</time>
                </setting>
            </traverse>
            <output>gear/unit[0]/nose-wheel-steering/kinematic-norm</output>
        </kinematic>

        <switch name="names/nose-wheel-steering/tmp-norm">
            <default value="fcs/steer-cmd-norm"/>
            <test logic="OR" value="gear/unit[0]/nose-wheel-steering/kinematic-norm">
                systems/hydraulics/flight-surface-actuation == 0
                gear/unit[0]/nose-wheel-steering/serviceable == 0
            </test>
            <test logic="OR" value="0">
                gear/unit[0]/nose-wheel-steering/enable == 0
            </test>
            <output>gear/unit[0]/nose-wheel-steering/tmp-norm</output>
        </switch>

        <!-- Page 180 of JA-37C manual: maximum 30 degs deflection -->
        <scheduled_gain name="names/nose-wheel-steering/steer-pos-deg">
            <input>gear/unit[0]/nose-wheel-steering/kinematic-norm</input>
            <table>
                <independentVar>velocities/vg-fps</independentVar>
                <tableData><!-- note that this is positive also when moving in reverse -->
                       10.0       30.00
                       20.0       25.00
                       50.0        5.00
                      100.0        1.50
                      150.0        0.75
                      200.0        0.50 <!-- by this speed the front wheel hardly touches the runway -->
                </tableData>
            </table>
            <output>fcs/steer-pos-deg</output>
        </scheduled_gain>
    </channel>


    <channel execrate="1" name="Flaps">
        <!-- Can move 30 degrees down, and 4 degrees up -->

        <switch name="names/flaps/cmd-active">
            <default value="0"/>
            <test logic="OR" value="1">
                /ja37/elec/dc-bus-main-bool == 1
            </test>
            <output>fcs/flaps/pos-cmd</output>
        </switch>

        <kinematic name="names/flaps/pos-norm">
            <input>fcs/flaps/tmp-norm</input>
            <traverse>
                <setting>
                    <position>  0.0 </position>
                    <time>      0.0 </time>
                </setting>
                <setting>
                    <position>  1.0 </position>
                    <time>     10.0 </time> <!-- from videos it looks to take 10-15 secs to retract flaps. -->
                </setting>
            </traverse>
            <output>fcs/flaps/pos-normalized</output>
        </kinematic>

        <switch name="names/flaps/tmp-norm">
            <default value="gear/gear-target-norm"/>
            <!-- flaps controlled by gear-->
            <test logic="OR" value="fcs/flaps/pos-normalized">
                  systems/hydraulics/flight-surface-actuation == 0
                  fcs/flaps/serviceable == 0
            </test>
            <test logic="OR" value="0.11765"><!-- default flaps position -->
                fcs/flaps/pos-cmd == 0
            </test>
            <output>fcs/flaps/tmp-norm</output>
        </switch>

        <aerosurface_scale name="names/flaps/pos-deg">
            <input>fcs/flaps/pos-normalized</input>
            <zero_centered> false </zero_centered>
            <domain>
                <min>  0.0 </min>
                <max>  1.0 </max>
            </domain>
            <range>
                <min> -4.0 </min>
                <max> 30.0 </max>
            </range>
            <output>fcs/flap-pos-deg</output>
        </aerosurface_scale>

        <pure_gain name="names/flaps/pos-deg-MP">
            <input>fcs/flap-pos-deg</input>
            <gain>1</gain>
            <output>fcs/flap-pos-norm</output>
            <!-- is really deg, used for auto MP transmit and animation -->
        </pure_gain>

    </channel>

    <channel execrate="1" name="Speedbrake">

        <switch name="fcs/speedbrake-cmd-norm-output">
            <default value="fcs/speedbrake-cmd-norm"/>
            <test logic="OR" value="0">
                  velocities/mach gt 0.92
            </test>
            <test logic="OR" value="fcs/speedbrake-pos-norm">
                  systems/hydraulics/system1/pressure == 0
            </test>
        </switch>

        <kinematic name="names/speedbrake/pos-norm">
            <input>fcs/speedbrake-cmd-norm-output</input>
            <traverse>
                <setting>
                    <position>  0.0 </position>
                    <time>      0.0 </time>
                </setting>
                <setting>
                    <position>  1.0 </position>
                    <time>      2.5 </time>
                </setting>
            </traverse>
            <output>fcs/speedbrake-pos-norm</output>
        </kinematic>

    </channel>

    <channel execrate="1" name="Throttle"><!-- execrate must be 1, else wont overwrite fcs/throttle-pos-norm properly -->

        <!-- from AJS-37 Description part 4

        throttle pos:
        0-3 deg = stop mode
        13-16   = ground idle
        24.5    = flight idle
        62-65   = max mil
        120     = zone 3 end

        -->

        <kinematic name="fcs/throttle-pos-slowed">
            <input>/controls/engines/engine/throttle</input>
            <traverse>
                <setting>
                    <position>0</position>
                    <time>0</time>
                </setting>
                <setting>
                    <position>1</position>
                    <time>0.5</time>
                </setting>
            </traverse>
        </kinematic>

        <aerosurface_scale name="names/throttle/pos-norm-deg">
            <input>fcs/throttle-pos-slowed</input>
            <zero_centered> false </zero_centered>
            <domain>
                <min>  0.00 </min>
                <max>  1.00 </max>
            </domain>
            <range>
                <min>    0 </min>
                <max>  120 </max>
            </range>
            <clipto>
                <min>  0 </min>
                <max>  120 </max>
            </clipto>
            <output>fcs/throttle-pos-deg</output>
        </aerosurface_scale>

        <aerosurface_scale name="names/throttle/pos-norm-scale">
            <input>fcs/throttle-pos-deg</input>
            <zero_centered> false </zero_centered>
            <domain>
                <min>  0 </min>
                <max> 62 </max>
            </domain>
            <range>
                <min>  0.0 </min>
                <max>  1.0 </max>
            </range>
            <clipto>
                <min>  0 </min>
                <max>  1 </max>
            </clipto>
            <output>fcs/throttle-pos-norm-scale</output>
        </aerosurface_scale>

        <!-- factor for augmentation power -->
        <aerosurface_scale name="names/throttle/zone-factor">
            <input>fcs/throttle-pos-deg</input>
            <zero_centered> false </zero_centered>
            <domain>
                <min>   70 </min>
                <max>  120 </max>
            </domain>
            <range>
                <min>  0.60 </min>
                <max>  1.00 </max>
            </range>
            <clipto>
                <min>  0 </min>
                <max>  1 </max>
            </clipto>
            <output>propulsion/engine/zone-factor</output>
        </aerosurface_scale>

        <!-- augmentation zone -->
        <switch name="names/throttle/zone">
            <default value="0"/>
            <test logic="AND" value="0">
              fcs/throttle-pos-deg lt 70
            </test>
            <test logic="AND" value="1">
              fcs/throttle-pos-deg lt 82.5
            </test>
            <test logic="AND" value="2">
              fcs/throttle-pos-deg lt 95
            </test>
            <test logic="AND" value="3">
              fcs/throttle-pos-deg ge 95
            </test>
            <output>propulsion/engine/zone</output>
        </switch>

        <!-- used for animating nozzle indicator -->
        <aerosurface_scale name="names/throttle/zone-scaled">
            <input>fcs/throttle-pos-deg</input>
            <zero_centered> false </zero_centered>
            <domain>
                <min>   70 </min>
                <max>  120 </max>
            </domain>
            <range>
                <min>  0.00 </min>
                <max>  1.00 </max>
            </range>
            <clipto>
                <min>  0 </min>
                <max>  1 </max>
            </clipto>
            <output>propulsion/engine/zone-scaled</output>
        </aerosurface_scale>

        <!-- used for animating afterburner flame -->
        <switch name="names/throttle/aug-flame">
            <default value="propulsion/engine/zone-scaled"/>
            <test logic="OR" value="0">
              propulsion/engine/augmentation == 0
          </test>
          <output>propulsion/engine/aug-flame</output>
          <output>/sim/multiplay/generic/float[3]</output>
        </switch>

        <!-- pure_gain is the only component that can overwrite fcs/throttle-pos-norm -->
        <pure_gain name="names/throttle/pos-norm">
            <input>fcs/throttle-pos-norm-scale</input>
            <gain>1.0</gain>
            <output>fcs/throttle-pos-norm</output>
            <!--<output>fcs/throttle-cmd-norm</output>-->
        </pure_gain>

        <switch name="names/throttle/augmentation">
            <default value="0"/>
            <test logic="AND" value="1">
              fcs/throttle-pos-deg ge 70
              propulsion/engine/n2 ge 84
              /controls/engines/engine/cutoff-augmentation == 0
              /engines/engine/is-reversed == 0
              /engines/engine/afterburner/serviceable == 1
              /engines/engine/running == 1
          </test>
            <output>propulsion/engine/augmentation</output>
        </switch>

    </channel>


    <channel execrate="4" name="Autopilot">
        <scheduled_gain name="names/autopilot/Autopilot-max-climb">
            <input>autopilot/one</input>
            <table>
                <independentVar lookup="row">/instrumentation/airspeed-indicator/indicated-speed-kt</independentVar>
                <tableData>
                              <!-- feet/min -->
                      000             0
                      100             0<!-- was 175-->
                      225          2500<!-- was  50-->
                      350         15000
                      700         20000
                     1400         75000
                </tableData>
            </table>
            <output>autopilot/climb</output><!-- feet/sec -->
        </scheduled_gain>

        <pure_gain name="names/autopilot/Autopilot-min-climb">
            <input>autopilot/climb</input>
            <gain>-0.8</gain>
            <output>autopilot/descent</output>
        </pure_gain>

        <fcs_function name="autopilot/normal-min">
            <function>
                <table>
                    <independentVar lookup="row">/orientation/pitch-deg</independentVar>
                    <tableData>
                         -5 -0.1
                          0  0.5
                         30  1
                    </tableData>
                </table>
            </function>
            <output>/autopilot/internal/normal-min</output>
        </fcs_function>

        <fcs_function name="autopilot/normal-max">
            <function>
                <table>
                    <independentVar lookup="row">/orientation/pitch-deg</independentVar>
                    <tableData>
                      -30  -1
                        0  -0.5
                        5  0.1
                    </tableData>
                </table>
            </function>
            <output>/autopilot/internal/normal-max</output>
        </fcs_function>

        <fcs_function name="names/autopilot/Autopilot-min-elevator">
            <function>
                <table>
                    <independentVar lookup="row">/ja37/accelerations/pilot-G</independentVar>
                    <tableData>
                        3.0           -0.75
                        4.5           -0.1
                    </tableData>
                </table>
            </function>
            <output>/autopilot/internal/min-elevator</output>
        </fcs_function>

        <fcs_function name="names/autopilot/Autopilot-max-elevator">
            <function>
                <table>
                    <independentVar lookup="row">/ja37/accelerations/pilot-G</independentVar>
                    <tableData>
                       -1.20           0
                       -0.20           0.75
                    </tableData>
                </table>
            </function>
            <output>/autopilot/internal/max-elevator</output>
        </fcs_function>

    </channel>


    <!--<channel name="View">
      <summer name="position/h-sl-pilot-ft">
        <input>position/h-sl-ft</input>
        <input>position/selection-view-offset</input>
      </summer>
    </channel>-->


    <channel execrate="8" name="Wings">
        <aerosurface_scale name="names/structural/Wings-normal-factor">
            <input>structural/wings/serviceable</input>
            <zero_centered> false </zero_centered>
            <domain>
                <min>  0.0 </min>
                <max>  1.0 </max>
            </domain>
            <range>
                <min> 0.2 </min>
                <max> 1.0 </max>
            </range>
            <output>structural/wings/normal-factor</output>
        </aerosurface_scale>
    </channel>

    <channel execrate="4" name="Cursor">
      <switch name="fcs/cursor/cursor-X-from-flight-controls">
        <description>Cursor control component from flight controls</description>
        <default value="0"/>
        <test value="fcs/aileron-cmd-norm">
            /ja37/systems/input-controls-flight == 0
        </test>
      </switch>
      <switch name="fcs/cursor/cursor-Y-from-flight-controls">
        <description>Cursor control component from flight controls</description>
        <default value="0"/>
        <test value="fcs/elevator-cmd-norm">
            /ja37/systems/input-controls-flight == 0
        </test>
      </switch>
      <switch name="fcs/cursor/cursor-trigger-from-flight-controls">
        <description>Cursor control component from flight controls</description>
        <default value="0"/>
        <test value="/controls/armament/trigger">
            /ja37/systems/input-controls-flight == 0
        </test>
      </switch>

      <summer name="fcs/cursor/cursor-control-X">
        <description>Combined cursor control</description>
        <input>fcs/cursor/cursor-X-from-flight-controls</input>
        <input>/ja37/systems/cursor-control-X</input>
        <clipto>
          <min>-1.0</min>
          <max>1.0</max>
        </clipto>
      </summer>
      <summer name="fcs/cursor/cursor-control-Y">
        <description>Combined cursor control</description>
        <input>fcs/cursor/cursor-Y-from-flight-controls</input>
        <input>/ja37/systems/cursor-control-Y</input>
        <clipto>
          <min>-1.0</min>
          <max>1.0</max>
        </clipto>
      </summer>
      <switch name="names/fcs/cursor/cursor-select">
        <description>Combined cursor control</description>
        <default value="0"/>
        <test logic="OR" value="1">
          fcs/cursor/cursor-trigger-from-flight-controls == 1
          /ja37/systems/cursor-select == 1
        </test>
        <output>fcs/cursor/cursor-select</output><!-- to prevent property from becoming double -->
      </switch>
    </channel>
</flight_control>
